*Heading
** Job name: Job-1 Model name: Model-1
** Generated by: Abaqus/CAE 6.14-1
*Preprint, echo=NO, model=NO, history=NO, contact=NO
**
** PARTS
**
*Part, name=test-sample
*Node
      1,           1.,           1.,           1.
      2,           1.,           0.,           1.
      3,           1.,           1.,           0.
      4,           1.,           0.,           0.
      5,           0.,           1.,           1.
      6,           0.,           0.,           1.
      7,           0.,           1.,           0.
      8,           0.,           0.,           0.
      9,           0.,           1.,          0.5
     10,           0.,          0.5,           0.
     11,           0.,           0.,          0.5
     12,           0.,          0.5,           1.
     13,           1.,          0.5,           1.
     14,           1.,           0.,          0.5
     15,           1.,          0.5,           0.
     16,           1.,           1.,          0.5
     17,          0.5,           0.,           1.
     18,          0.5,           1.,           1.
     19,          0.5,           0.,           0.
     20,          0.5,           1.,           0.
*Element, type=C3D20R
1,  5,  6,  8,  7,  1,  2,  4,  3, 12, 11, 10,  9, 13, 14, 15,
   16, 18, 17, 19, 20
*Nset, nset=block, generate
  1,  20,   1
*Elset, elset=block
 1,
** Section: tissue
*Solid Section, elset=block, material=soft-tissue
,
*End Part
**
**
** ASSEMBLY
**
*Assembly, name=Assembly
**
*Instance, name=test-sample-1, part=test-sample
*End Instance
**
*Nset, nset=pull, instance=test-sample-1
  1,  2,  3,  4, 13, 14, 15, 16
*Elset, elset=pull, instance=test-sample-1
 1,
*Nset, nset=x, instance=test-sample-1, generate
  5,  12,   1
*Elset, elset=x, instance=test-sample-1
 1,
*Nset, nset=y, instance=test-sample-1
  2,  4,  6,  8, 11, 14, 17, 19
*Elset, elset=y, instance=test-sample-1
 1,
*Nset, nset=z, instance=test-sample-1
  3,  4,  7,  8, 10, 15, 19, 20
*Elset, elset=z, instance=test-sample-1
 1,
*End Assembly
*Amplitude, name=Amp-1
             0.,             0.1,
             0.2,             0.3,
              6.,              1.
**
** MATERIALS
**
*Material, name=soft-tissue
*Hyperelastic, n=2, ogden
1.,2.,3.,4.,5.,6.
*Time Points, name=TimePoints-1
0., 0.2, 0.5, 6.
**
** BOUNDARY CONDITIONS
**
** Name: BC-1 Type: Displacement/Rotation
*Boundary
x, 1, 1
** Name: BC-2 Type: Displacement/Rotation
*Boundary
y, 2, 2
** Name: BC-3 Type: Displacement/Rotation
*Boundary
z, 3, 3
** ----------------------------------------------------------------
**
** STEP: load
**
*Step, name=load, nlgeom=YES, inc=1000
*Static
6., 6., 6e-05, 6.
**
** BOUNDARY CONDITIONS
**
** Name: pull Type: Displacement/Rotation
*Boundary, amplitude=Amp-1
pull, 1, 1, 0.12
pull, 2, 2, 12.
pull, 3, 3, 13.
pull, 4, 4, 14.
**
** OUTPUT REQUESTS
**
*Restart, write, frequency=0
**
** FIELD OUTPUT: F-Output-1
**
*Output, field, time points=TimePoints-1
*Node Output
CF, RF, U
*Element Output, directions=YES
E, S
**
** HISTORY OUTPUT: H-Output-1
**
*Output, history, variable=PRESELECT
*End Step
