*Heading
** Job name: Job-1 Model name: Model-1
** Generated by: Abaqus/CAE 6.14-1
*Preprint, echo=NO, model=NO, history=NO, contact=NO
**
** PARTS
**
*Part, name=buldge-specimen
*Node
      1,           0.,          15.,           3.
      2,           0.,          15.,           0.
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*Element, type=C3D10
  1,  447,    9,  229,   62,  575,  574,  573,  577,  576,  578
  2,  447,  448,  230,  238,  581,  580,  579,  583,  582,  584
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*Nset, nset=all, generate
    1,  3637,     1
*Elset, elset=all, generate
    1,  2075,     1
** Section: specimen
*Solid Section, elset=all, material=soft-tissue
,
*End Part
**
**
** ASSEMBLY
**
*Assembly, name=Assembly
**
*Instance, name=buldge-specimen-1, part=buldge-specimen
*End Instance
**
*Nset, nset=bottom-clamp, instance=buldge-specimen-1
    2,    3,    5,    6,   11,   12
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*Elset, elset=bottom-clamp, instance=buldge-specimen-1
    7,    8,   95,   97,  100,  152
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*Nset, nset=bottom-inflate, instance=buldge-specimen-1
    5,    6,    7,   11,   12,   38
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*Elset, elset=bottom-inflate, instance=buldge-specimen-1
   18,   44,  156,  158,  159,  172
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*Nset, nset=centre, instance=buldge-specimen-1
 8,
*Nset, nset=top-clamp, instance=buldge-specimen-1
    1,    4,    9,   10,   15,   16
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*Elset, elset=top-clamp, instance=buldge-specimen-1
   88,   90,  149,  153,  166,  170
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*Elset, elset=_inflate-surface_S3, internal, instance=buldge-specimen-1
   18,   44,  156,  158,  159,  172
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*Elset, elset=_inflate-surface_S4, internal, instance=buldge-specimen-1
  299,  316,  326,  335,  347,  352,  607,  645,  986, 1353, 1385, 1499, 1612, 1621, 1651, 1977
*Elset, elset=_inflate-surface_S2, internal, instance=buldge-specimen-1
  343,  355,  366,  907,  924, 1020, 1130, 1170, 1340, 1934, 1943, 1953, 2017, 2047
*Elset, elset=_inflate-surface_S1, internal, instance=buldge-specimen-1
  743,  965, 1110
*Surface, type=ELEMENT, name=inflate-surface
_inflate-surface_S3, S3
_inflate-surface_S4, S4
_inflate-surface_S2, S2
_inflate-surface_S1, S1
*End Assembly
*Amplitude, name=Amp-1
             0.,              0.,              6.,              1.
**
** MATERIALS
**
*Material, name=soft-tissue
*Hyperelastic, n=2, ogden
4.676099827483091, 3.0, 1.998435387483091, 100.00000001490116, 0.21385343275236485, 0.5003914593703426
*Time Points, name=TimePoints-1
0., 1., 2., 3., 6.
**
** BOUNDARY CONDITIONS
**
** Name: bottom-clamp Type: Symmetry/Antisymmetry/Encastre
*Boundary
bottom-clamp, PINNED
** ----------------------------------------------------------------
**
** STEP: clamp
**
*Step, name=clamp, nlgeom=YES
*Static
5., 5., 5e-05, 5.
**
** BOUNDARY CONDITIONS
**
** Name: clamp Type: Displacement/Rotation
*Boundary
top-clamp, 1, 1
top-clamp, 2, 2
top-clamp, 3, 3, -1.
**
** OUTPUT REQUESTS
**
*Restart, write, frequency=0
**
** FIELD OUTPUT: F-Output-1
**
*Output, field, variable=PRESELECT
**
** HISTORY OUTPUT: H-Output-1
**
*Output, history, variable=PRESELECT
*End Step
** ----------------------------------------------------------------
**
** STEP: inflate
**
*Step, name=inflate, nlgeom=YES
*Static
5., 5., 5e-05, 5.
**
** LOADS
**
** Name: inflate   Type: Pressure
*Dsload, amplitude=Amp-1
inflate-surface, P, 3.
**
** OUTPUT REQUESTS
**
*Restart, write, frequency=0
**
** FIELD OUTPUT: F-Output-3
**
*Output, field
*Element Output, directions=YES
P,
**
** FIELD OUTPUT: F-Output-1
**
*Output, field, variable=PRESELECT
**
** FIELD OUTPUT: F-Output-2
**
*Output, field, time points=TimePoints-1
*Node Output, nset=centre
UT,
**
** HISTORY OUTPUT: H-Output-1
**
*Output, history, variable=PRESELECT
*End Step
